<?xml version="1.0" encoding="utf-8"?>
<!--

  Swedish Navy 20m-class motor torpedo boat "flight" model for JSBSim.

    Copyright (C) 2012  Anders Gidenstam  (anders(at)gidenstam.org)

    This program is free software; you can redistribute it and/or modify
    it under the terms of the GNU General Public License as published by
    the Free Software Foundation; either version 2 of the License, or
    (at your option) any later version.

    This program is distributed in the hope that it will be useful,
    but WITHOUT ANY WARRANTY; without even the implied warranty of
    MERCHANTABILITY or FITNESS FOR A PARTICULAR PURPOSE.  See the
    GNU General Public License for more details.

    You should have received a copy of the GNU General Public License
    along with this program; if not, write to the Free Software
    Foundation, Inc., 59 Temple Place, Suite 330, Boston, MA  02111-1307  USA

-->
<piston_engine name="Isotta Fraschini/Polar IF 184">
 <documentation>
   Isotta Fraschini/Polar IF 184 high performance marine petrol engine.

   [Borgenstam:...]:
     1500 hp @ 2000 RPM, 1100hp@2000 RPM without supercharger
     57 litre
     18 cylinders
   [Borgenstam:http://www.veteranflottiljen.se/artiklar/mtbmot_utv2.html,
   ,Borgenstam:http://www.veteranflottiljen.se/artiklar/mtbmot_utv.html]
     1500 hp @ 2000 RPM
     57 litre
     18 cylinders
     Fuel consumption: 250 g/hph
   [web]
     Supercharged
     1450 kg
   [Teknikens Värld:1972:13]
     57.25 litre
     "innan detta (max) varvtal kan tas ut måste de köras med omkring
     1 000 varv (20 knop) för att uppnå rätt arbetstemperatur. Detta
     tar omkring en kvart, och innan dess kan man alltså inte dra på
     för fullt. De kan inte heller köras någon längre stund under 1000
     varv, för då sotar tändstiften, två per cylinder, lätt igen."
     "båtarna också försedda med två V8:or. sidveintilare på 85 hk, de
     används vid tilläggning och farter upp till 7 knop."
   [http://www.marinmuseum.se/sv/Samlingar/MarketStore/Foremal1/?msobjid=0010400]
     Typ: 18 - cylindrig, 4 takts, vattenkyld W - motor med kuggväxeldriven
     kompressor och försedd med lamellkoppling och marschväxel.
     Tillverkare av den italienska typen IF 184 Soc. An. Fabrica Automobili
     Isotta Fraschini, Milano Italien
                  Max. effekt högst 10 min  30 min  Max. kontinuerlig effekt
     Varvtal r/m  2000                      1875    1750
     Effekt hk    1500                      1320    1150
     Mått och vikt på en hel Isotta motor:
       Längd 2795 mm Bredd 1395 mm Höjd 1265 mm
 </documentation>

 <displacement unit="LTR"> 57.00  </displacement>
 <!--
 <bore unit="M">             . </bore>
 <stroke unit="M">           . </stroke>
 <compression-ratio>         .  </compression-ratio
 -->
 <cylinders>               18.00  </cylinders>
 <cycles>                   4.00  </cycles>

 <maxhp>                  1100.00 </maxhp>

 <idlerpm>                 400.00 </idlerpm>
 <maxrpm>                 2000.00 </maxrpm>

 <!-- bsfc unit="LBS/HP*HR">     0.37 </bsfc -->
 <!-- volumetric_efficiency>          <volumetric_efficiency -->

 <numboostspeeds> 1.0 </numboostspeeds>
 <boostoverride>  0 </boostoverride>
 <boost-loss-factor> 1.20 </boost-loss-factor>

 <ratedboost1 unit="PSI">      4.00 </ratedboost1>
 <ratedpower1 unit="HP">    1500.00 </ratedpower1>
 <ratedrpm1>                2000.00 </ratedrpm1>
 <ratedaltitude1 unit="M">    50.00 </ratedaltitude1>

 <sparkfaildrop>             0.10 </sparkfaildrop>

 <minmp unit="INHG">         10.0 </minmp>
 <maxmp unit="INHG">         28.5 </maxmp>

 <minthrottle> 0.1 </minthrottle>
 <maxthrottle> 1.0 </maxthrottle>

 <!--
     Propeller propulsion system.
 -->

 <function name="propulsion/engine[#]/hydro-advance-ratio">
  <quotient>
   <property>hydro/vbx-fps</property>
   <sum>
    <value>0.000000001</value>
    <product>
     <value>0.016666667</value>
     <property>propulsion/engine[#]/propeller-rpm</property>
     <value>9.0</value>
    </product>
   </sum>
  </quotient>
 </function>

 <function name="propulsion/engine[#]/hydro-thrust-coefficient">
  <product>
   <value>0.8</value>
   <table> <!-- FIXME: Use the engine specific hydro-advance-ratio. -->
    <independentVar lookup="row">propulsion/engine[0]/hydro-advance-ratio</independentVar>
    <tableData>
   0.00000   0.46800
   0.05000   0.40187
   0.10000   0.33575
   0.15000   0.40267
   0.20000   0.46960
   0.25000   0.46913
   0.30000   0.46866
   0.35000   0.46681
   0.40000   0.46495
   0.45000   0.46095
   0.50000   0.45696
   0.55000   0.45152
   0.60000   0.44609
   0.65000   0.43996
   0.70000   0.43383
   0.75000   0.42840
   0.80000   0.42297
   0.85000   0.42678
   0.90000   0.43058
   0.95000   0.43208
   1.00000   0.43358
   1.05000   0.42239
   1.10000   0.41120
   1.15000   0.39367
   1.20000   0.37614
   1.25000   0.35476
   1.30000   0.33339
   1.35000   0.31118
   1.40000   0.28897
   1.45000   0.26513
   1.50000   0.24128
   1.55000   0.22008
   1.60000   0.19889
   1.65000   0.17432
   1.70000   0.14975
   1.75000   0.12303
   1.80000   0.09482
   1.85000   0.06861
   1.90000   0.04202
   1.95000   0.01459
   2.00000  -0.01243
    </tableData>
   </table>
  </product>
 </function>

 <function name="propulsion/engine[#]/hydro-power-coefficient">
  <product>
   <value>0.8</value>
   <table> <!-- FIXME: Use the engine specific hydro-advance-ratio. -->
    <independentVar lookup="row">propulsion/engine[0]/hydro-advance-ratio</independentVar>
    <tableData>
   0.00000   0.81635
   0.05000   0.71833
   0.10000   0.62031
   0.15000   0.72590
   0.20000   0.83148
   0.25000   0.83567
   0.30000   0.83987
   0.35000   0.84274
   0.40000   0.84561
   0.45000   0.84808
   0.50000   0.85055
   0.55000   0.85284
   0.60000   0.85513
   0.65000   0.85741
   0.70000   0.85968
   0.75000   0.85894
   0.80000   0.85819
   0.85000   0.84344
   0.90000   0.82869
   0.95000   0.81666
   1.00000   0.80463
   1.05000   0.79019
   1.10000   0.77575
   1.15000   0.75267
   1.20000   0.72958
   1.25000   0.69905
   1.30000   0.66851
   1.35000   0.63449
   1.40000   0.60048
   1.45000   0.56155
   1.50000   0.52262
   1.55000   0.48655
   1.60000   0.45047
   1.65000   0.40663
   1.70000   0.36279
   1.75000   0.31363
   1.80000   0.26080
   1.85000   0.21094
   1.90000   0.15967
   1.95000   0.10622
   2.00000   0.05324
    </tableData>
   </table>
  </product>
 </function>

 <function name="propulsion/engine[#]/real-thrust-lbs">
  <min>
   <product>
    <property>propulsion/engine[#]/clutch-pos-norm</property>
    <property>hydro/rho-slug_ft3</property>
    <value>0.000277777</value> <!-- 1/60^2 -->
    <property>propulsion/engine[#]/propeller-rpm</property>
    <property>propulsion/engine[#]/propeller-rpm</property>
    <value>27.82</value>        <!-- D^4 -->
    <property>propulsion/engine[#]/hydro-thrust-coefficient</property>
   </product>
   <value>100000.0</value>
  </min>
 </function>

 <function name="propulsion/engine[#]/power-required-hp">
  <product>
   <property>propulsion/engine[#]/clutch-pos-norm</property>
   <value>0.0018181818</value> <!-- slug ft^2 / s^3 -> hp -->
   <property>hydro/rho-slug_ft3</property>
   <value>0.000004629</value>  <!-- 1/60^3 -->
   <property>propulsion/engine[#]/propeller-rpm</property>
   <property>propulsion/engine[#]/propeller-rpm</property>
   <property>propulsion/engine[#]/propeller-rpm</property>
   <value>63.89</value>        <!-- D^5 -->
   <property>propulsion/engine[#]/hydro-power-coefficient</property>
  </product>
 </function>

 <function name="propulsion/engine[#]/required-aero-power-coefficient">
  <max>
   <product>
    <property>propulsion/engine[#]/clutch-pos-norm</property>
    <quotient>
     <property>hydro/rho-slug_ft3</property>
     <property>atmosphere/rho-slugs_ft3</property>
    </quotient>
    <property>propulsion/engine[#]/hydro-power-coefficient</property>
   </product>
   <value>0.05</value>
  </max>
 </function>

</piston_engine>
